solve block
    # guess values
    P0000 := 0
    P0100 := 0.1
    P0001 := 0.1
    P1100 := 0.1
    P0101 := 0.1
    P0011 := 0.1
    P1101 := 0.1
    P0111 := 0.1
    P1111 := 0.1
    p1 := 0.3
    p2 := 0.55
    p3 := 0.65
    # constraints
    P0100 == (1 - p1)*P0000 + p1*p2*P0100 + (1 - p1)*(1 - p3)*P0001 + p1*p2*(1 - p3)*P0101
    P0001 == p1*(1 - p2)*P0100 + p1*p3*P0001 + p1*(1 - p2)*(1 - p3)*P0101 + p1*(1 - p3)*P0011
    P1100 == (1 - p1)*p2*P0100 + (p1*p2 + (1 - p1)*p2)*P1100 + (1 - p1)*p2*(1 - p3)*P0101 + (p1*p2*(1 - p3) + (1 - p1)*p2*(1 - p3))*P1101
    P0101 == (1 - p1)*(1 - p2)*P0100 + (1 - p1)*p3*P0001 + p1*(1 - p2)*P1100 + ((1 - p1)*(1 - p2)*(1 - p3) + p1*p2*p3)*P0101 + (1 - p1)*(1 - p3)*P0011 + p1*p2*(1 - p3)*P0111 + p1*(1 - p2)*(1 - p3)*P1101
    P0011 == p1*(1 - p2)*p3*P0101 + p1*p3*P0011 + (p1*(1 - p2)*(1 - p3) + p1*(1 - p2)*p3)*P0111
    P1101 == (1 - p1)*(1 - p2)*P1100 + (1 - p1)*p2*p3*P0101 + ((1 - p1)*(1 - p2)*(1 - p3) + p1*p2*p3 + (1 - p1)*p2*p3)*P1101 + (1 - p1)*p2*(1 - p3)*P0111 + (p1*p2*(1 - p3) + (1 - p1)*p2*(1 - p3))*P1111
    P0111 == (1 - p1)*(1 - p2)*p3*P0101 + (1 - p1)*p3*P0011 + ((1 - p1)*(1 - p2)*(1 - p3) + (1 - p1)*(1 - p2)*p3 + p1*p2*p3)*P0111 + p1*(1 - p2)*p3*P1101 + (p1*(1 - p2)*(1 - p3) + p1*(1 - p2)*p3)*P1111
    P1111 == (1 - p1)*(1 - p2)*p3*P1101 + (1 - p1)*p2*p3*P0111 + ((1 - p1)*(1 - p2)*(1 - p3) + (1 - p1)*(1 - p2)*p3 + p1*p2*p3 + (1 - p1)*p2*p3)*P1111
    P0000 + P0100 + P0001 + P1100 + P0101 + P0011 + P1101 + P0111 + P1111 == 1
    # solver
    Find(P0000, P0100, P0001, P1100, P0101, P0011, P1101, P0111, P1111) = [0.00159043; 0.00958877; 0.0106029; 0.14505; 0.074383; 0.035488; 0.267832; 0.163265; 0.2922]
end solve block
solve block
    # guess values
    P0000 := 0.002
    P0100 := 0.01
    P0001 := 0.011
    P1100 := 0.145
    P0101 := 0.074
    P0011 := 0.035
    P1101 := 0.268
    P0111 := 0.163
    P1111 := 0.292
    p1 := 0.3
    p2 := 0.55
    p3 := 0.65
    A := 0
    Q := 0
    Pot := 0
    Pbl := 0
    L1 := 0
    L2 := 0
    Lc := 0
    W1 := 0
    W2 := 0
    W0 := 0
    Wc := 0
    K1 := 0
    K2 := 0
    # constraints
    A == (1 - p3)*P0001*P0101*P0011*P1101*P0111*P1111
    Q == A/0.5
    Pot == 1 - Q
    L1 == P1100*P1101*P1111
    L2 == P0011*P0111*P1111
    Lc == P0100 + P0001 + 2*(P1100 + P0101 + P0011) + 3*(P1101 + P0111) + 4*P1111
    W1 == L1/((1 - p2)*(P1100 + P1101 + P1111))
    W2 == L2/((1 - p3)*(P0011 + P0111 + P1111))
    W0 == W1 + W2
    Wc == W0 + 1/(1 - p2) + 1/(1 - p3)
    K1 == P0100 + P1100 + P0101 + P1101 + P0111 + P1111
    K2 == P0001 + P0101 + P0011 + P1101 + P0111 + P1111
    # solver
    Find(A, Q, Pot, Pbl, L1, L2, Lc, W1, W2, W0, Wc, K1, K2) = [1.27194e-7; 2.54387e-7; 1; 0; 0.0113471; 0.00166586; 2.99; 0.0357671; 0.00971347; 0.0454806; 5.12485; 0.952; 0.843]
end solve block
